# Option 13
p_1 := 0.55
s := -1
p_2 := 0.5
One(x, y) := 1
Zero(x, y) := 0
# 2000
# 1000
# 2010
# 1010
# 1001
# 2110
X := [
    s, 1, 0, 0, 0, 0, 0, 0, 0, 0, 0, 0, 0;
    0, s, 1, 0, 0, 0, 0, 0, 0, 0, 0, 0, 0;
    0, 0, s, p_1, 1 - p_1, 0, 0, 0, 0, 0, 0, 0, 0;
    0, 0, 0, s, 0, p_1, 1 - p_1, 0, 0, 0, 0, 0, 0;
    0, 0, 1 - p_2, 0, s, 0, p_2, 0, 0, 0, 0, 0, 0;
    0, 0, 0, 0, 0, s, 0, p_1, 1 - p_1, 0, 0, 0, 0;
    0, 0, 0, p_1*(1 - p_2), 1 - p_1, 0, s, 0, p_1*p_2, 0, 0, 0, 0;
    0, 0, 0, 0, 0, 0, 0, s, 0, 1 - p_1, p_1, 0, 0;
    0, 0, 0, 0, 0, p_1*(1 - p_2), 1 - p_1, 0, s, p_1*p_2, 0, 0, 0;
    0, 0, 0, 0, 0, 0, 0, p_1*(1 - p_2), 1 - p_1, s, 0, 0, p_1*p_2;
    0, 0, 0, 0, 0, 0, 0, 0, 0, 1 - p_1, s + p_1, 0, 0;
    0, 0, 0, 0, 0, 0, 0, 0, 0, 1 - p_1, p_1*(1 - p_2), s + p_1*p_2, 0;
    0, 0, 0, 0, 0, 0, 0, 0, 0, 1 - p_1, p_1*(1 - p_2), p_1*p_2, s
]  # 2011
# 1110
# 1011
# 2111
transpose(X) = [
    -1, 0, 0, 0, 0, 0, 0, 0, 0, 0, 0, 0, 0;
    1, -1, 0, 0, 0, 0, 0, 0, 0, 0, 0, 0, 0;
    0, 1, -1, 0, 0.5, 0, 0, 0, 0, 0, 0, 0, 0;
    0, 0, 0.55, -1, 0, 0, 0.275, 0, 0, 0, 0, 0, 0;
    0, 0, 0.45, 0, -1, 0, 0.45, 0, 0, 0, 0, 0, 0;
    0, 0, 0, 0.55, 0, -1, 0, 0, 0.275, 0, 0, 0, 0;
    0, 0, 0, 0.45, 0.5, 0, -1, 0, 0.45, 0, 0, 0, 0;
    0, 0, 0, 0, 0, 0.55, 0, -1, 0, 0.275, 0, 0, 0;
    0, 0, 0, 0, 0, 0.45, 0.275, 0, -1, 0.45, 0, 0, 0;
    0, 0, 0, 0, 0, 0, 0, 0.45, 0.275, -1, 0.45, 0.45, 0.45;
    0, 0, 0, 0, 0, 0, 0, 0.55, 0, 0, -0.45, 0.275, 0.275;
    0, 0, 0, 0, 0, 0, 0, 0, 0, 0, 0, -0.725, 0.275;
    0, 0, 0, 0, 0, 0, 0, 0, 0, 0.275, 0, 0, -1
]
X - transpose(X) = [
    0, 1, 0, 0, 0, 0, 0, 0, 0, 0, 0, 0, 0;
    -1, 0, 1, 0, 0, 0, 0, 0, 0, 0, 0, 0, 0;
    0, -1, 0, 0.55, -0.05, 0, 0, 0, 0, 0, 0, 0, 0;
    0, 0, -0.55, 0, 0, 0.55, 0.175, 0, 0, 0, 0, 0, 0;
    0, 0, 0.05, 0, 0, 0, 0.05, 0, 0, 0, 0, 0, 0;
    0, 0, 0, -0.55, 0, 0, 0, 0.55, 0.175, 0, 0, 0, 0;
    0, 0, 0, -0.175, -0.05, 0, 0, 0, -0.175, 0, 0, 0, 0;
    0, 0, 0, 0, 0, -0.55, 0, 0, 0, 0.175, 0.55, 0, 0;
    0, 0, 0, 0, 0, -0.175, 0.175, 0, 0, -0.175, 0, 0, 0;
    0, 0, 0, 0, 0, 0, 0, -0.175, 0.175, 0, -0.45, -0.45, -0.175;
    0, 0, 0, 0, 0, 0, 0, -0.55, 0, 0.45, 0, -0.275, -0.275;
    0, 0, 0, 0, 0, 0, 0, 0, 0, 0.45, 0.275, 0, -0.275;
    0, 0, 0, 0, 0, 0, 0, 0, 0, 0.175, 0.275, 0.275, 0
]
# 0110
# 0111
# 1111
b := transpose(matrix(1, rows(X), Zero))
i := 12
X_2 := transpose(X)
b[i, :] := 1
X_2[i, :] := matrix(1, rows(X_2), One)
y_2 := lsolve(X_2, b)
p_2000 := y_2[0] = 0
p_1110 := y_2[7] = 0.0882382
p_1000 := y_2[1] = 0
p_1011 := y_2[8] = 0.147759
p_2010 := y_2[2] = 0.0375511
p_2111 := y_2[9] = 0.177754
p_1010 := y_2[3] = 0.0562223
p_0110 := y_2[10] = 0.14905
p_1001 := y_2[4] = 0.0751022
p_0111 := y_2[11] = 0.0185416
p_2110 := y_2[5] = 0.071556
p_1111 := y_2[12] = 0.0488825
p_2011 := y_2[6] = 0.129343
P_deny := (1 - p_1)*p_2*(p_2011 + p_1011 + p_2111 + p_1111 + p_0111)/(p_2000 + p_2010 + p_2110 + p_2011 + p_2111) = 0.282345
P_block := p_0110 + p_0111 = 0.167592
L_queue := 1*(p_1110 + p_2110 + p_2111 + p_0110 + p_0111) = 0.505141
L_tokensAvg := 1*(p_2010 + p_1001 + p_1010) + 2*(p_2011 + p_2110 + p_1110 + p_1011) + 3*(p_2111 + p_0110 + p_1111) + 4*p_0111 = 2.24389
Q := 1*(1 - P_deny) = 0.717655
A := ((1 - p_2)*(p_1001 + p_2011 + p_1011 + p_2111 + p_1111 + p_0111))/sum(y_2[i], i = 0 .. length(y_2) - 1) = 0.298691
A_deny := (1 - p_1)*p_2*(p_2011 + p_1011 + p_2111 + p_1111 + p_0111)/sum(y_2[i], i = 0 .. length(y_2) - 1) = 0.117513
W_queue := L_queue/(A + A_deny) = 1.21368
W_tokensAvg := L_tokensAvg/(A + A_deny) = 5.39133
M := [
    s, p_1, 1 - p_1, 0, 0, 0, 0, 0, 0, 0, 0;
    0, s, 0, p_1, 1 - p_1, 0, 0, 0, 0, 0, 0;
    1 - p_2, 0, s, 0, p_2, 0, 0, 0, 0, 0, 0;
    0, 0, 0, s, 0, p_1, 1 - p_1, 0, 0, 0, 0;
    0, p_1*(1 - p_2), 1 - p_1, 0, s, 0, p_1*p_2, 0, 0, 0, 0;
    0, 0, 0, 0, 0, s, 0, 1 - p_1, p_1, 0, 0;
    0, 0, 0, p_1*(1 - p_2), 1 - p_1, 0, s, p_1*p_2, 0, 0, 0;
    0, 0, 0, 0, 0, p_1*(1 - p_2), 1 - p_1, s, 0, 0, p_1*p_2;
    0, 0, 0, 0, 0, 0, 0, 1 - p_1, s + p_1, 0, 0;
    0, 0, 0, 0, 0, 0, 0, 1 - p_1, p_1*(1 - p_2), s + p_1*p_2, 0;
    0, 0, 0, 0, 0, 0, 0, 1 - p_1, p_1*(1 - p_2), p_1*p_2, s
]
transpose(M) = [
    -1, 0, 0.5, 0, 0, 0, 0, 0, 0, 0, 0;
    0.55, -1, 0, 0, 0.275, 0, 0, 0, 0, 0, 0;
    0.45, 0, -1, 0, 0.45, 0, 0, 0, 0, 0, 0;
    0, 0.55, 0, -1, 0, 0, 0.275, 0, 0, 0, 0;
    0, 0.45, 0.5, 0, -1, 0, 0.45, 0, 0, 0, 0;
    0, 0, 0, 0.55, 0, -1, 0, 0.275, 0, 0, 0;
    0, 0, 0, 0.45, 0.275, 0, -1, 0.45, 0, 0, 0;
    0, 0, 0, 0, 0, 0.45, 0.275, -1, 0.45, 0.45, 0.45;
    0, 0, 0, 0, 0, 0.55, 0, 0, -0.45, 0.275, 0.275;
    0, 0, 0, 0, 0, 0, 0, 0, 0, -0.725, 0.275;
    0, 0, 0, 0, 0, 0, 0, 0.275, 0, 0, -1
]
M[4, :] = [0, 0.275, 0.45, 0, -1, 0, 0.275, 0, 0, 0, 0]
mb := transpose([0, 0, 0, 0, 0, 0, 0, 0, 0, 0, 0])
mn := [1, 1, 1, 1, 1, 1, 1, 1, 1, 1, 1]
u := 2
M[u, :] := mn
mb[u, :] := 1
my := lsolve(M, mb)
mb = [0; 0; 1; 0; 0; 0; 0; 0; 0; 0; 0]
M = [
    -1, 0.55, 0.45, 0, 0, 0, 0, 0, 0, 0, 0;
    0, -1, 0, 0.55, 0.45, 0, 0, 0, 0, 0, 0;
    1, 1, 1, 1, 1, 1, 1, 1, 1, 1, 1;
    0, 0, 0, -1, 0, 0.55, 0.45, 0, 0, 0, 0;
    0, 0.275, 0.45, 0, -1, 0, 0.275, 0, 0, 0, 0;
    0, 0, 0, 0, 0, -1, 0, 0.45, 0.55, 0, 0;
    0, 0, 0, 0.275, 0.45, 0, -1, 0.275, 0, 0, 0;
    0, 0, 0, 0, 0, 0.275, 0.45, -1, 0, 0, 0.275;
    0, 0, 0, 0, 0, 0, 0, 0.45, -0.45, 0, 0;
    0, 0, 0, 0, 0, 0, 0, 0.45, 0.275, -0.725, 0;
    0, 0, 0, 0, 0, 0, 0, 0.45, 0.275, 0.275, -1
]
my = [0.0909091; 0.0909091; 0.0909091; 0.0909091; 0.0909091; 0.0909091; 0.0909091; 0.0909091; 0.0909091; 0.0909091; 0.0909091]
